// SBML level 2 version 4

model rtc2_counter()

  // Compartments:
  compartment Medium = 0.4;
  compartment Ecoli in Medium = 7e-16;

  // Species:
  species arab in Medium = 0; arab is "nb:i0003(arac)";
  species dna1 in Ecoli = 2.373042e-9; dna1 is "d:b0014*()-e0040*()-j01010*(rib~off)-r0085*(rnap)-b0014*()-i2032*(dna)-j01010*(rib~off)-j23100*()";
  species dna2 in Ecoli = 2.373042e-9; dna2 is "d:b0014*()-j01008*()-i0500*(arac1!1,arac2!2).p:c0080(arab,dim!3,dna!1).p:c0080(arab,dim!3,dna!2)";
  species nb_i0003_arac in Ecoli = 0; nb_i0003_arac is "nb:i0003(arac)";
  species r_j01010_rib_off_e0040 in Ecoli = 0; r_j01010_rib_off_e0040 is "r:j01010(rib~off)-e0040()";
  species r_j01010_rib_off_i2032_dna in Ecoli = 0; r_j01010_rib_off_i2032_dna is "r:j01010(rib~off)-i2032(dna)";
  species s7 in Ecoli = 0; s7 is "p:c0080(arab,dim!1,dna).p:c0080(arab,dim!1,dna)";
  species d_b0014_j01008_i0500_arac1_arac2 in Ecoli = 0; d_b0014_j01008_i0500_arac1_arac2 is "d:b0014*()-j01008*()-i0500*(arac1,arac2)";
  species r_j01008 in Ecoli = 0; r_j01008 is "r:j01008()";
  species s10 in Ecoli = 0; s10 is "nb:i0003(arac!1).p:c0080(arab!1,dim!2,dna).p:c0080(arab,dim!2,dna)";
  species p_c0080_arab_dim_dna in Ecoli = 0; p_c0080_arab_dim_dna is "p:c0080(arab,dim,dna)";
  species r_j01010_rib_on_e0040 in Ecoli = 0; r_j01010_rib_on_e0040 is "r:j01010(rib~on)-e0040()";
  species r_j01010_rib_on_i2032_dna in Ecoli = 0; r_j01010_rib_on_i2032_dna is "r:j01010(rib~on)-i2032(dna)";
  species s14 in Ecoli = 0; s14 is "nb:i0003(arac!1).nb:i0003(arac!2).p:c0080(arab!1,dim!3,dna).p:c0080(arab!2,dim!3,dna)";
  species s15 in Ecoli = 0; s15 is "nb:i0003(arac!1).p:c0080(arab!1,dim,dna)";
  species p_e0040 in Ecoli = 0; p_e0040 is "p:e0040()";
  species p_i2032_dna in Ecoli = 0; p_i2032_dna is "p:i2032(dna)";
  species s18 in Ecoli = 0; s18 is "d:b0014*()-e0040*()-j01010*(rib~off)-r0085*(rnap!1)-b0014*()-i2032*(dna)-j01010*(rib~off)-j23100*().p:i2032(dna!1)";

  // Parameters:
  NA = 6.02e23;
  f = 1;
  N = 1;
  pulse_conc = 0.001;
  pulse1_start = 2500.01;
  pulse2_start = 2561.01;
  arab_init = 0;
  transp2_pout = 0.2;
  transp2_pin = 0.2;
  rule10_k = 0.0001;
  rule13_k = 1.5;
  rule6_k = 0.01;
  rule12_k = 0.0005;
  rule21_k = 0.35;
  rule16_k = 0.07;
  rule17_k = 0.0706;
  rule1_k = 100000000;
  rule4_k = 0.1;
  rule5_k = 71000000000;
  rule11_k = 0.1;
  rule15_kcat = 7.6;
  rule15_Km = 0.0009;
  rule18_k = 0.167;
  rule2_k = 10;
  rule3_k = 1000000000;
  rule14_k = 0.1;
  rule20_k = 0.0015;
  rule7_k = 2000000;
  rule19_k = 0.0056;
  rule8_k = 0.06;
  rule9_k = 0.5;

  // Assignment rules:
  Ve := f*0.4;
  V := f*7e-16;
  dna1_init := 1/NA/V;
  dna2_init := 1/NA/V;
  time_ := time;

  // Reactions:
  r1: => arab; N*transp2_pout*nb_i0003_arac*Medium;  // modifiers: nb_i0003_arac
  r2: arab => ; N*transp2_pin*arab*Medium;
  r3: => nb_i0003_arac; transp2_pin*arab*Ecoli;  // modifiers: arab
  r4: nb_i0003_arac => ; transp2_pout*nb_i0003_arac*Ecoli;
  r5: => r_j01010_rib_off_e0040; rule10_k*dna1*Ecoli;  // modifiers: dna1
  r6: => r_j01010_rib_off_i2032_dna; rule13_k*dna1*Ecoli;  // modifiers: dna1
  r7: dna2 => s7 + d_b0014_j01008_i0500_arac1_arac2; 2*rule6_k*dna2*Ecoli;
  r8: => r_j01008; rule12_k*dna2*Ecoli;  // modifiers: dna2
  r9: nb_i0003_arac => ; rule21_k*nb_i0003_arac*Ecoli;
  r10: r_j01010_rib_off_e0040 => ; rule16_k*r_j01010_rib_off_e0040*Ecoli;
  r11: r_j01010_rib_off_i2032_dna => ; rule17_k*r_j01010_rib_off_i2032_dna*Ecoli;
  r12: s7 + nb_i0003_arac => s10; rule1_k*s7*nb_i0003_arac*Ecoli;
  r13: s7 + nb_i0003_arac => s10; rule1_k*s7*nb_i0003_arac*Ecoli;
  r14: s7 => p_c0080_arab_dim_dna + p_c0080_arab_dim_dna; rule4_k*s7*Ecoli;
  r15: s7 + d_b0014_j01008_i0500_arac1_arac2 => dna2; rule5_k*s7*d_b0014_j01008_i0500_arac1_arac2*Ecoli;
  r16: => r_j01008; rule11_k*d_b0014_j01008_i0500_arac1_arac2*Ecoli;  // modifiers: d_b0014_j01008_i0500_arac1_arac2
  r17: r_j01010_rib_off_e0040 => r_j01010_rib_on_e0040; rule15_kcat*r_j01008*r_j01010_rib_off_e0040/(rule15_Km + r_j01010_rib_off_e0040)*Ecoli;  // modifiers: r_j01008
  r18: r_j01010_rib_off_i2032_dna => r_j01010_rib_on_i2032_dna; rule15_kcat*r_j01008*r_j01010_rib_off_i2032_dna/(rule15_Km + r_j01010_rib_off_i2032_dna)*Ecoli;  // modifiers: r_j01008
  r19: r_j01008 => ; rule18_k*r_j01008*Ecoli;
  r20: s10 + nb_i0003_arac => s14; rule1_k*s10*nb_i0003_arac*Ecoli;
  r21: s10 => nb_i0003_arac + s7; rule2_k*s10*Ecoli;
  r22: s10 => p_c0080_arab_dim_dna + s15; rule4_k*s10*Ecoli;
  r23: s10 => s7; rule21_k*s10*Ecoli;
  r24: p_c0080_arab_dim_dna + nb_i0003_arac => s15; rule1_k*p_c0080_arab_dim_dna*nb_i0003_arac*Ecoli;
  r25: p_c0080_arab_dim_dna + p_c0080_arab_dim_dna => s7; 0.5*rule3_k*p_c0080_arab_dim_dna*p_c0080_arab_dim_dna*Ecoli;
  r26: => p_e0040; rule14_k*r_j01010_rib_on_e0040*Ecoli;  // modifiers: r_j01010_rib_on_e0040
  r27: r_j01010_rib_on_e0040 => ; rule16_k*r_j01010_rib_on_e0040*Ecoli;
  r28: => p_i2032_dna; rule14_k*r_j01010_rib_on_i2032_dna*Ecoli;  // modifiers: r_j01010_rib_on_i2032_dna
  r29: r_j01010_rib_on_i2032_dna => ; rule17_k*r_j01010_rib_on_i2032_dna*Ecoli;
  r30: s14 => s10 + nb_i0003_arac; 2*rule2_k*s14*Ecoli;
  r31: s14 => s15 + s15; rule4_k*s14*Ecoli;
  r32: s14 => s10; 2*rule21_k*s14*Ecoli;
  r33: s15 => p_c0080_arab_dim_dna + nb_i0003_arac; rule2_k*s15*Ecoli;
  r34: p_c0080_arab_dim_dna + s15 => s10; rule3_k*p_c0080_arab_dim_dna*s15*Ecoli;
  r35: s15 + s15 => s14; 0.5*rule3_k*s15*s15*Ecoli;
  r36: s15 => p_c0080_arab_dim_dna; rule21_k*s15*Ecoli;
  r37: p_e0040 => ; rule20_k*p_e0040*Ecoli;
  r38: p_i2032_dna + dna1 => s18; rule7_k*p_i2032_dna*dna1*Ecoli;
  r39: p_i2032_dna => ; rule19_k*p_i2032_dna*Ecoli;
  r40: s18 => dna1 + p_i2032_dna; rule8_k*s18*Ecoli;
  r41: => r_j01010_rib_off_e0040; rule9_k*s18*Ecoli;  // modifiers: s18
  r42: => r_j01010_rib_off_i2032_dna; rule13_k*s18*Ecoli;  // modifiers: s18
  r43: s18 => dna1; rule19_k*s18*Ecoli;

  // Events:
  pulse1: at (time_ > pulse1_start): arab = pulse_conc;
  pulse2: at (time_ > pulse2_start): arab = pulse_conc;
end
